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/batch
! ANSYS input file written by Workbench version 2022 R2
! File used for geometry attach: C:\Users\Ahmet Burak Akyuz\Desktop\Table.STEP
/title,Bending_Study--Modal (C5)
/COM,/COM,     ANSYSMotion, 2022.2
/com,--- Data in consistent MKS units. See Solving Units in the help system for more information.
/units,MKS
/prep7
! Turn off shape checking because checks already performed inside WB mesher.
! See help system for more information.
SHPP,OFF,,NOWARN
etcon,set             ! allow ANSYS to choose best KEYOP's for 180x elements, resets any applicable keyopt to MAPDL defaults
/com,*********** Nodes for the whole assembly ***********
nblock,3,,17120
(1i9,3e20.9e3)
        1    -3.743977242E-02     1.270001699E-01     1.026000000E-01
        2    -3.743977242E-02     1.270001699E-01     1.012000000E-01
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-1
/com,*********** Elements for Body 1 "RealBase_Varsay_lan|Cut-Extrude1" ***********
et,1,187
eblock,19,solid,,669
(19i9)
        1        1        1        1        0        0        0        0       10        0     2445     5197     5389     5375     5283     5769     6593     5768     5765
     6221     6219
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-1
/com,*********** Elements for Body 2 "ServoMotor_Varsay_lan|Boss-Extrude5" ***********
et,2,187
eblock,19,solid,,812
(19i9)
        2        2        2        2        0        0        0        0       10        0     3114     6627     6667     6863     6666     7065     7305     7069     7064
     7298     7301
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-1
/com,*********** Elements for Body 3 "ServoMotor_Varsay_lan|Boss-Extrude5[2]" ***********
et,3,187
eblock,19,solid,,812
(19i9)
        3        3        3        3        0        0        0        0       10        0     3926     8190     8230     8426     8229     8628     8868     8632     8627
     8861     8864
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-1
/com,*********** Elements for Body 4 "Joint1_Varsay_lan|Boss-Extrude2" ***********
et,4,187
eblock,19,solid,,628
(19i9)
        4        4        4        4        0        0        0        0       10        0     4738     9792     9972     9933     9950    10419    11003    10415    10416
    11051    11001
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-1
/com,*********** Elements for Body 5 "Joint2_Varsay_lan|Boss-Extrude2" ***********
et,5,187
eblock,19,solid,,891
(19i9)
        5        5        5        5        0        0        0        0       10        0     1291     2754     2982     2891     2977     3574     4222     3570     3573
     4491     4221
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-1
/com,*********** Elements for Body 6 "JointUnion_Varsay_lan|Boss-Extrude3" ***********
et,6,187
eblock,19,solid,,708
(19i9)
        6        6        6        6        0        0        0        0       10        0      292      779      786      883      863     1642     1676     1646     1645
     1675     2013
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-1
/com,*********** Elements for Body 7 "NewConnectionForBall_Varsay_lan|Cut-Extrude3" ***********
et,7,187
eblock,19,solid,,291
(19i9)
        7        7        7        7        0        0        0        0       10        0        1      104      114      120      105      613      633      614      610
      615      618
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-1
/com,*********** Elements for Body 8 "NewConnectionforServo_Varsay_lan|Cut-Extrude11" ***********
et,8,187
eblock,19,solid,,263
(19i9)
        8        8        8        8        0        0        0        0       10        0     2182     4521     4627     4599     4532     4705     5073     4699     4696
     4797     4794
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-1
/com,*********** Elements for Body 9 "NewConnectionForBall_Varsay_lan|Cut-Extrude3[2]" ***********
et,9,187
eblock,19,solid,,291
(19i9)
        9        9        9        9        0        0        0        0       10        0     1000     2132     2142     2148     2133     2641     2661     2642     2638
     2643     2646
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-1
/com,*********** Elements for Body 10 "NewConnectionforServo_Varsay_lan|Cut-Extrude11[2]" ***********
et,10,187
eblock,19,solid,,263
(19i9)
       10       10       10       10        0        0        0        0       10        0     7070    14970    15076    15048    14981    15154    15522    15148    15145
    15246    15243
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-1
/com,*********** Elements for Body 11 "Base_Varsay_lan|Cut-Extrude3" ***********
et,11,187
eblock,19,solid,,586
(19i9)
       11       11       11       11        0        0        0        0       10        0     6281    13306    13386    13309    13320    14163    14185    14156    14157
    14255    14181
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-1
/com,*********** Elements for Body 12 "NewAttempt_Varsay_lan|Cut-Extrude7" ***********
et,12,187
eblock,19,solid,,356
(19i9)
       12       12       12       12        0        0        0        0       10        0     5366    11201    11202    11220    11208    11839    11846    11843    11841
    11844    11860
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-1
/com,*********** Elements for Body 13 "NewAttempt_Varsay_lan|Cut-Extrude7[2]" ***********
et,13,187
eblock,19,solid,,356
(19i9)
       13       13       13       13        0        0        0        0       10        0     5722    12001    12002    12020    12008    12639    12646    12643    12641
    12644    12660
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-1
/com,*********** Elements for Body 14 "NewAttempt2_Varsay_lan|Boss-Extrude3" ***********
et,14,187
eblock,19,solid,,203
(19i9)
       14       14       14       14        0        0        0        0       10        0     6078    12708    12716    12737    12763    13007    13025    13010    13012
    13029    13082
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-1
/com,*********** Elements for Body 15 "NewAttempt2_Varsay_lan|Boss-Extrude3[2]" ***********
et,15,187
eblock,19,solid,,203
(19i9)
       15       15       15       15        0        0        0        0       10        0     6867    14520    14528    14549    14575    14819    14837    14822    14824
    14841    14894
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-1
/com,*********** Send User Defined Coordinate System(s) ***********
csys,0
toffst,273.15,  ! Temperature offset from absolute zero
/com,*********** Set Reference Temperature ***********
tref,22.
/com,*********** Send Materials ***********
Temperature = 'TEMP' ! Temperature
MP,DENS,1,7850,	! kg m^-3
MP,ALPX,1,1.2e-05,	! C^-1
MP,C,1,434,	! J kg^-1 C^-1
MP,KXX,1,60.5,	! W m^-1 C^-1
MP,RSVX,1,1.7e-07,	! kg m^3 A^-2 s^-3
MP,EX,1,200000000000,	! Pa
MP,NUXY,1,0.3,
MP,MURX,1,10000,

Temperature = 'TEMP' ! Temperature
MP,DENS,2,7850,	! kg m^-3
MP,ALPX,2,1.2e-05,	! C^-1
MP,C,2,434,	! J kg^-1 C^-1
MP,KXX,2,60.5,	! W m^-1 C^-1
MP,RSVX,2,1.7e-07,	! kg m^3 A^-2 s^-3
MP,EX,2,200000000000,	! Pa
MP,NUXY,2,0.3,
MP,MURX,2,10000,

Temperature = 'TEMP' ! Temperature
MP,DENS,3,7850,	! kg m^-3
MP,ALPX,3,1.2e-05,	! C^-1
MP,C,3,434,	! J kg^-1 C^-1
MP,KXX,3,60.5,	! W m^-1 C^-1
MP,RSVX,3,1.7e-07,	! kg m^3 A^-2 s^-3
MP,EX,3,200000000000,	! Pa
MP,NUXY,3,0.3,
MP,MURX,3,10000,

Temperature = 'TEMP' ! Temperature
MP,DENS,4,7850,	! kg m^-3
MP,ALPX,4,1.2e-05,	! C^-1
MP,C,4,434,	! J kg^-1 C^-1
MP,KXX,4,60.5,	! W m^-1 C^-1
MP,RSVX,4,1.7e-07,	! kg m^3 A^-2 s^-3
MP,EX,4,200000000000,	! Pa
MP,NUXY,4,0.3,
MP,MURX,4,10000,

Temperature = 'TEMP' ! Temperature
MP,DENS,5,7850,	! kg m^-3
MP,ALPX,5,1.2e-05,	! C^-1
MP,C,5,434,	! J kg^-1 C^-1
MP,KXX,5,60.5,	! W m^-1 C^-1
MP,RSVX,5,1.7e-07,	! kg m^3 A^-2 s^-3
MP,EX,5,200000000000,	! Pa
MP,NUXY,5,0.3,
MP,MURX,5,10000,

Temperature = 'TEMP' ! Temperature
MP,DENS,6,7850,	! kg m^-3
MP,ALPX,6,1.2e-05,	! C^-1
MP,C,6,434,	! J kg^-1 C^-1
MP,KXX,6,60.5,	! W m^-1 C^-1
MP,RSVX,6,1.7e-07,	! kg m^3 A^-2 s^-3
MP,EX,6,200000000000,	! Pa
MP,NUXY,6,0.3,
MP,MURX,6,10000,

Temperature = 'TEMP' ! Temperature
MP,DENS,7,7850,	! kg m^-3
MP,ALPX,7,1.2e-05,	! C^-1
MP,C,7,434,	! J kg^-1 C^-1
MP,KXX,7,60.5,	! W m^-1 C^-1
MP,RSVX,7,1.7e-07,	! kg m^3 A^-2 s^-3
MP,EX,7,200000000000,	! Pa
MP,NUXY,7,0.3,
MP,MURX,7,10000,

Temperature = 'TEMP' ! Temperature
MP,DENS,8,7850,	! kg m^-3
MP,ALPX,8,1.2e-05,	! C^-1
MP,C,8,434,	! J kg^-1 C^-1
MP,KXX,8,60.5,	! W m^-1 C^-1
MP,RSVX,8,1.7e-07,	! kg m^3 A^-2 s^-3
MP,EX,8,200000000000,	! Pa
MP,NUXY,8,0.3,
MP,MURX,8,10000,

Temperature = 'TEMP' ! Temperature
MP,DENS,9,7850,	! kg m^-3
MP,ALPX,9,1.2e-05,	! C^-1
MP,C,9,434,	! J kg^-1 C^-1
MP,KXX,9,60.5,	! W m^-1 C^-1
MP,RSVX,9,1.7e-07,	! kg m^3 A^-2 s^-3
MP,EX,9,200000000000,	! Pa
MP,NUXY,9,0.3,
MP,MURX,9,10000,

Temperature = 'TEMP' ! Temperature
MP,DENS,10,7850,	! kg m^-3
MP,ALPX,10,1.2e-05,	! C^-1
MP,C,10,434,	! J kg^-1 C^-1
MP,KXX,10,60.5,	! W m^-1 C^-1
MP,RSVX,10,1.7e-07,	! kg m^3 A^-2 s^-3
MP,EX,10,200000000000,	! Pa
MP,NUXY,10,0.3,
MP,MURX,10,10000,

Temperature = 'TEMP' ! Temperature
MP,DENS,11,7850,	! kg m^-3
MP,ALPX,11,1.2e-05,	! C^-1
MP,C,11,434,	! J kg^-1 C^-1
MP,KXX,11,60.5,	! W m^-1 C^-1
MP,RSVX,11,1.7e-07,	! kg m^3 A^-2 s^-3
MP,EX,11,200000000000,	! Pa
MP,NUXY,11,0.3,
MP,MURX,11,10000,

Temperature = 'TEMP' ! Temperature
MP,DENS,12,7850,	! kg m^-3
MP,ALPX,12,1.2e-05,	! C^-1
MP,C,12,434,	! J kg^-1 C^-1
MP,KXX,12,60.5,	! W m^-1 C^-1
MP,RSVX,12,1.7e-07,	! kg m^3 A^-2 s^-3
MP,EX,12,200000000000,	! Pa
MP,NUXY,12,0.3,
MP,MURX,12,10000,

Temperature = 'TEMP' ! Temperature
MP,DENS,13,7850,	! kg m^-3
MP,ALPX,13,1.2e-05,	! C^-1
MP,C,13,434,	! J kg^-1 C^-1
MP,KXX,13,60.5,	! W m^-1 C^-1
MP,RSVX,13,1.7e-07,	! kg m^3 A^-2 s^-3
MP,EX,13,200000000000,	! Pa
MP,NUXY,13,0.3,
MP,MURX,13,10000,

Temperature = 'TEMP' ! Temperature
MP,DENS,14,7850,	! kg m^-3
MP,ALPX,14,1.2e-05,	! C^-1
MP,C,14,434,	! J kg^-1 C^-1
MP,KXX,14,60.5,	! W m^-1 C^-1
MP,RSVX,14,1.7e-07,	! kg m^3 A^-2 s^-3
MP,EX,14,200000000000,	! Pa
MP,NUXY,14,0.3,
MP,MURX,14,10000,

Temperature = 'TEMP' ! Temperature
MP,DENS,15,7850,	! kg m^-3
MP,ALPX,15,1.2e-05,	! C^-1
MP,C,15,434,	! J kg^-1 C^-1
MP,KXX,15,60.5,	! W m^-1 C^-1
MP,RSVX,15,1.7e-07,	! kg m^3 A^-2 s^-3
MP,EX,15,200000000000,	! Pa
MP,NUXY,15,0.3,
MP,MURX,15,10000,

!************************* Model Summary ********************
!RealBase_Varsay_lan|Cut-Extrude1,	Structural Steel,	matid,	1
!ServoMotor_Varsay_lan|Boss-Extrude5,	Structural Steel,	matid,	2
!ServoMotor_Varsay_lan|Boss-Extrude5[2],	Structural Steel,	matid,	3
!Joint1_Varsay_lan|Boss-Extrude2,	Structural Steel,	matid,	4
!Joint2_Varsay_lan|Boss-Extrude2,	Structural Steel,	matid,	5
!JointUnion_Varsay_lan|Boss-Extrude3,	Structural Steel,	matid,	6
!NewConnectionForBall_Varsay_lan|Cut-Extrude3,	Structural Steel,	matid,	7
!NewConnectionforServo_Varsay_lan|Cut-Extrude11,	Structural Steel,	matid,	8
!NewConnectionForBall_Varsay_lan|Cut-Extrude3[2],	Structural Steel,	matid,	9
!NewConnectionforServo_Varsay_lan|Cut-Extrude11[2],	Structural Steel,	matid,	10
!Base_Varsay_lan|Cut-Extrude3,	Structural Steel,	matid,	11
!NewAttempt_Varsay_lan|Cut-Extrude7,	Structural Steel,	matid,	12
!NewAttempt_Varsay_lan|Cut-Extrude7[2],	Structural Steel,	matid,	13
!NewAttempt2_Varsay_lan|Boss-Extrude3,	Structural Steel,	matid,	14
!NewAttempt2_Varsay_lan|Boss-Extrude3[2],	Structural Steel,	matid,	15
!************************* End Model Summary ********************
/com,*********** Create Contact "Contact Region" ***********
*set,tid,17
*set,cid,16
r,tid
r,cid
et,tid,170
et,cid,174
eblock,10,,,16
(15i9)
    12431       17       17       17        0     5238     5239     5269     5269     5934     5942     5269     5936
    12432       17       17       17        0     5239     5268     5269     5269     5941     6106     5269     5942
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-1
eblock,10,,,16
(15i9)
    12447       16       16       16        0     5238     5239     5269     5269     5934     5942     5269     5936
    12448       16       16       16        0     5239     5268     5269     5269     5941     6106     5269     5942
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-1
eblock,10,,,28
(15i9)
    12463       16       17       16        0     6626     6666     6660     6660     7060     7276     6660     7059
    12464       16       17       16        0     6659     6660     6666     6666     7272     7276     6666     7274
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-1
eblock,10,,,28
(15i9)
    12491       17       16       17        0     6626     6666     6660     6660     7060     7276     6660     7059
    12492       17       16       17        0     6659     6660     6666     6666     7272     7276     6666     7274
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-1
keyo,cid,8,2               ! auto create asymmetric contact (from Program Controlled setting)
keyo,cid,10,0              ! adjust contact stiffness each NR iteration (from Program Controlled setting)
keyo,cid,12,5              ! bonded always
keyo,cid,18,1              ! small sliding turned on by application
keyo,cid,2,0               ! augmented Lagrange (from Program Controlled setting)
keyo,cid,4,0               ! on Gauss point (from Program Controlled setting)
keyo,cid,9,1               ! ignore initial gaps/penetration
keyo,cid,7,0               ! No Prediction
rmod,tid,3,10.      ! FKN
rmod,tid,5,0.       ! ICONT
rmod,tid,6,0.       ! PINB
rmod,tid,10,0.      ! CNOF
rmod,tid,12,0.      ! FKT
rmod,tid,36,68      ! WB DSID
rmod,cid,3,10.      ! FKN
rmod,cid,5,0.       ! ICONT
rmod,cid,6,0.       ! PINB
rmod,cid,10,0.      ! CNOF
rmod,cid,12,0.      ! FKT
rmod,cid,36,68      ! WB DSID
/com,*********** Create Contact "Contact Region 2" ***********
*set,tid,19
*set,cid,18
r,tid
r,cid
et,tid,170
et,cid,174
eblock,10,,,16
(15i9)
    12519       19       19       19        0     5234     5274     5276     5276     5917     6143     5276     5918
    12520       19       19       19        0     5232     5276     5275     5275     5906     6153     5275     5905
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-1
eblock,10,,,16
(15i9)
    12535       18       18       18        0     5234     5274     5276     5276     5917     6143     5276     5918
    12536       18       18       18        0     5232     5276     5275     5275     5906     6153     5275     5905
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-1
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eblock,10,,,28
(15i9)
    12579       19       18       19        0     8226     8229     8363     8363     8848     8862     8363     8849
    12580       19       18       19        0     8220     8224     8363     8363     8828     8842     8363     8829
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-1
keyo,cid,8,2               ! auto create asymmetric contact (from Program Controlled setting)
keyo,cid,10,0              ! adjust contact stiffness each NR iteration (from Program Controlled setting)
keyo,cid,12,5              ! bonded always
keyo,cid,18,1              ! small sliding turned on by application
keyo,cid,2,0               ! augmented Lagrange (from Program Controlled setting)
keyo,cid,4,0               ! on Gauss point (from Program Controlled setting)
keyo,cid,9,1               ! ignore initial gaps/penetration
keyo,cid,7,0               ! No Prediction
rmod,tid,3,10.      ! FKN
rmod,tid,5,0.       ! ICONT
rmod,tid,6,0.       ! PINB
rmod,tid,10,0.      ! CNOF
rmod,tid,12,0.      ! FKT
rmod,tid,36,71      ! WB DSID
rmod,cid,3,10.      ! FKN
rmod,cid,5,0.       ! ICONT
rmod,cid,6,0.       ! PINB
rmod,cid,10,0.      ! CNOF
rmod,cid,12,0.      ! FKT
rmod,cid,36,71      ! WB DSID
/com,*********** Create Contact "Contact Region 3" ***********
*set,tid,21
*set,cid,20
r,tid
r,cid
et,tid,170
et,cid,174
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eblock,10,,,68
(15i9)
    12747       21       20       21        0     9837     9832     9833     9833    10586    10585     9833    10590
    12748       21       20       21        0     9830     9834     9829     9829    10577    10574     9829    10573
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-1
keyo,cid,8,2               ! auto create asymmetric contact (from Program Controlled setting)
keyo,cid,10,0              ! adjust contact stiffness each NR iteration (from Program Controlled setting)
keyo,cid,12,5              ! bonded always
keyo,cid,18,1              ! small sliding turned on by application
keyo,cid,2,0               ! augmented Lagrange (from Program Controlled setting)
keyo,cid,4,0               ! on Gauss point (from Program Controlled setting)
keyo,cid,9,1               ! ignore initial gaps/penetration
keyo,cid,7,0               ! No Prediction
rmod,tid,3,10.      ! FKN
rmod,tid,5,0.       ! ICONT
rmod,tid,6,0.       ! PINB
rmod,tid,10,0.      ! CNOF
rmod,tid,12,0.      ! FKT
rmod,tid,36,74      ! WB DSID
rmod,cid,3,10.      ! FKN
rmod,cid,5,0.       ! ICONT
rmod,cid,6,0.       ! PINB
rmod,cid,10,0.      ! CNOF
rmod,cid,12,0.      ! FKT
rmod,cid,36,74      ! WB DSID
/com,*********** Create Contact "Contact Region 4" ***********
*set,tid,23
*set,cid,22
r,tid
r,cid
et,tid,170
et,cid,174
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eblock,10,,,12
(15i9)
    12851       23       22       23        0     4518     4595     4513     4513     4682     4636     4513     4629
    12852       23       22       23        0     4595     4597     4598     4598     5064     5069     4598     5065
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-1
keyo,cid,8,2               ! auto create asymmetric contact (from Program Controlled setting)
keyo,cid,10,0              ! adjust contact stiffness each NR iteration (from Program Controlled setting)
keyo,cid,12,5              ! bonded always
keyo,cid,18,1              ! small sliding turned on by application
keyo,cid,2,0               ! augmented Lagrange (from Program Controlled setting)
keyo,cid,4,0               ! on Gauss point (from Program Controlled setting)
keyo,cid,9,1               ! ignore initial gaps/penetration
keyo,cid,7,0               ! No Prediction
rmod,tid,3,10.      ! FKN
rmod,tid,5,0.       ! ICONT
rmod,tid,6,0.       ! PINB
rmod,tid,10,0.      ! CNOF
rmod,tid,12,0.      ! FKT
rmod,tid,36,77      ! WB DSID
rmod,cid,3,10.      ! FKN
rmod,cid,5,0.       ! ICONT
rmod,cid,6,0.       ! PINB
rmod,cid,10,0.      ! CNOF
rmod,cid,12,0.      ! FKT
rmod,cid,36,77      ! WB DSID
/com,*********** Create Contact "Contact Region 5" ***********
*set,tid,25
*set,cid,24
r,tid
r,cid
et,tid,170
et,cid,174
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eblock,10,,,12
(15i9)
    12899       25       24       25        0    14967    15044    14962    14962    15131    15085    14962    15078
    12900       25       24       25        0    15044    15046    15047    15047    15513    15518    15047    15514
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-1
keyo,cid,8,2               ! auto create asymmetric contact (from Program Controlled setting)
keyo,cid,10,0              ! adjust contact stiffness each NR iteration (from Program Controlled setting)
keyo,cid,12,5              ! bonded always
keyo,cid,18,1              ! small sliding turned on by application
keyo,cid,2,0               ! augmented Lagrange (from Program Controlled setting)
keyo,cid,4,0               ! on Gauss point (from Program Controlled setting)
keyo,cid,9,1               ! ignore initial gaps/penetration
keyo,cid,7,0               ! No Prediction
rmod,tid,3,10.      ! FKN
rmod,tid,5,0.       ! ICONT
rmod,tid,6,0.       ! PINB
rmod,tid,10,0.      ! CNOF
rmod,tid,12,0.      ! FKT
rmod,tid,36,80      ! WB DSID
rmod,cid,3,10.      ! FKN
rmod,cid,5,0.       ! ICONT
rmod,cid,6,0.       ! PINB
rmod,cid,10,0.      ! CNOF
rmod,cid,12,0.      ! FKT
rmod,cid,36,80      ! WB DSID
/com,*********** Create Contact "Contact Region 6" ***********
*set,tid,27
*set,cid,26
r,tid
r,cid
et,tid,170
et,cid,174
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eblock,10,,,80
(15i9)
    13131       27       26       27        0      651      653      655      655      954      965      655      955
    13132       27       26       27        0      652      655      656      656      959      988      656      960
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-1
keyo,cid,8,2               ! auto create asymmetric contact (from Program Controlled setting)
keyo,cid,10,0              ! adjust contact stiffness each NR iteration (from Program Controlled setting)
keyo,cid,12,5              ! bonded always
keyo,cid,18,1              ! small sliding turned on by application
keyo,cid,2,0               ! augmented Lagrange (from Program Controlled setting)
keyo,cid,4,0               ! on Gauss point (from Program Controlled setting)
keyo,cid,9,1               ! ignore initial gaps/penetration
keyo,cid,7,0               ! No Prediction
rmod,tid,3,10.      ! FKN
rmod,tid,5,0.       ! ICONT
rmod,tid,6,0.       ! PINB
rmod,tid,10,0.      ! CNOF
rmod,tid,12,0.      ! FKT
rmod,tid,36,83      ! WB DSID
rmod,cid,3,10.      ! FKN
rmod,cid,5,0.       ! ICONT
rmod,cid,6,0.       ! PINB
rmod,cid,10,0.      ! CNOF
rmod,cid,12,0.      ! FKT
rmod,cid,36,83      ! WB DSID
/com,*********** Create Contact "Contact Region 7" ***********
*set,tid,29
*set,cid,28
r,tid
r,cid
et,tid,170
et,cid,174
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eblock,10,,,70
(15i9)
    13453       29       28       29        0      658      731      661      661     1017     1045      661     1014
    13454       29       28       29        0      731      732      748      748     1465     1474      748     1466
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-1
keyo,cid,8,2               ! auto create asymmetric contact (from Program Controlled setting)
keyo,cid,10,0              ! adjust contact stiffness each NR iteration (from Program Controlled setting)
keyo,cid,12,5              ! bonded always
keyo,cid,18,1              ! small sliding turned on by application
keyo,cid,2,0               ! augmented Lagrange (from Program Controlled setting)
keyo,cid,4,0               ! on Gauss point (from Program Controlled setting)
keyo,cid,9,1               ! ignore initial gaps/penetration
keyo,cid,7,0               ! No Prediction
rmod,tid,3,10.      ! FKN
rmod,tid,5,0.       ! ICONT
rmod,tid,6,0.       ! PINB
rmod,tid,10,0.      ! CNOF
rmod,tid,12,0.      ! FKT
rmod,tid,36,86      ! WB DSID
rmod,cid,3,10.      ! FKN
rmod,cid,5,0.       ! ICONT
rmod,cid,6,0.       ! PINB
rmod,cid,10,0.      ! CNOF
rmod,cid,12,0.      ! FKT
rmod,cid,36,86      ! WB DSID
/com,*********** Create Contact "Contact Region 8" ***********
*set,tid,31
*set,cid,30
r,tid
r,cid
et,tid,170
et,cid,174
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eblock,10,,,22
(15i9)
    13641       31       30       31        0    13277    13273    13271    13271    13957    13947    13271    13948
    13642       31       30       31        0    13280    13267    13273    13273    13927    13925    13273    13958
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-1
keyo,cid,8,2               ! auto create asymmetric contact (from Program Controlled setting)
keyo,cid,10,0              ! adjust contact stiffness each NR iteration (from Program Controlled setting)
keyo,cid,12,5              ! bonded always
keyo,cid,18,1              ! small sliding turned on by application
keyo,cid,2,0               ! augmented Lagrange (from Program Controlled setting)
keyo,cid,4,0               ! on Gauss point (from Program Controlled setting)
keyo,cid,9,1               ! ignore initial gaps/penetration
keyo,cid,7,0               ! No Prediction
rmod,tid,3,10.      ! FKN
rmod,tid,5,0.       ! ICONT
rmod,tid,6,0.       ! PINB
rmod,tid,10,0.      ! CNOF
rmod,tid,12,0.      ! FKT
rmod,tid,36,89      ! WB DSID
rmod,cid,3,10.      ! FKN
rmod,cid,5,0.       ! ICONT
rmod,cid,6,0.       ! PINB
rmod,cid,10,0.      ! CNOF
rmod,cid,12,0.      ! FKT
rmod,cid,36,89      ! WB DSID
/com,*********** Create Contact "Contact Region 9" ***********
*set,tid,33
*set,cid,32
r,tid
r,cid
et,tid,170
et,cid,174
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eblock,10,,,22
(15i9)
    13813       33       32       33        0    13293    13255    13292    13292    13852    13851    13292    14085
    13814       33       32       33        0    13256    13255    13293    13293    13850    13852    13293    13859
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-1
keyo,cid,8,2               ! auto create asymmetric contact (from Program Controlled setting)
keyo,cid,10,0              ! adjust contact stiffness each NR iteration (from Program Controlled setting)
keyo,cid,12,5              ! bonded always
keyo,cid,18,1              ! small sliding turned on by application
keyo,cid,2,0               ! augmented Lagrange (from Program Controlled setting)
keyo,cid,4,0               ! on Gauss point (from Program Controlled setting)
keyo,cid,9,1               ! ignore initial gaps/penetration
keyo,cid,7,0               ! No Prediction
rmod,tid,3,10.      ! FKN
rmod,tid,5,0.       ! ICONT
rmod,tid,6,0.       ! PINB
rmod,tid,10,0.      ! CNOF
rmod,tid,12,0.      ! FKT
rmod,tid,36,92      ! WB DSID
rmod,cid,3,10.      ! FKN
rmod,cid,5,0.       ! ICONT
rmod,cid,6,0.       ! PINB
rmod,cid,10,0.      ! CNOF
rmod,cid,12,0.      ! FKT
rmod,cid,36,92      ! WB DSID
/com,*********** Create Contact "Contact Region 10" ***********
*set,tid,35
*set,cid,34
r,tid
r,cid
et,tid,170
et,cid,174
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eblock,10,,,36
(15i9)
    13919       35       34       35        0    14497    14498    14566    14566    14659    14673    14566    14665
    13920       35       34       35        0    14498    14499    14567    14567    14667    14680    14567    14674
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-1
keyo,cid,8,2               ! auto create asymmetric contact (from Program Controlled setting)
keyo,cid,10,0              ! adjust contact stiffness each NR iteration (from Program Controlled setting)
keyo,cid,12,5              ! bonded always
keyo,cid,18,1              ! small sliding turned on by application
keyo,cid,2,0               ! augmented Lagrange (from Program Controlled setting)
keyo,cid,4,0               ! on Gauss point (from Program Controlled setting)
keyo,cid,9,1               ! ignore initial gaps/penetration
keyo,cid,7,0               ! No Prediction
rmod,tid,3,10.      ! FKN
rmod,tid,5,0.       ! ICONT
rmod,tid,6,0.       ! PINB
rmod,tid,10,0.      ! CNOF
rmod,tid,12,0.      ! FKT
rmod,tid,36,95      ! WB DSID
rmod,cid,3,10.      ! FKN
rmod,cid,5,0.       ! ICONT
rmod,cid,6,0.       ! PINB
rmod,cid,10,0.      ! CNOF
rmod,cid,12,0.      ! FKT
rmod,cid,36,95      ! WB DSID
/com,*********** Create Contact "Contact Region 11" ***********
*set,tid,37
*set,cid,36
r,tid
r,cid
et,tid,170
et,cid,174
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eblock,10,,,32
(15i9)
    14023       37       36       37        0    11894    11975    12002    12002    12199    12560    12002    12201
    14024       37       36       37        0    11975    11892    12002    12002    12182    12184    12002    12560
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-1
keyo,cid,8,2               ! auto create asymmetric contact (from Program Controlled setting)
keyo,cid,10,0              ! adjust contact stiffness each NR iteration (from Program Controlled setting)
keyo,cid,12,5              ! bonded always
keyo,cid,18,1              ! small sliding turned on by application
keyo,cid,2,0               ! augmented Lagrange (from Program Controlled setting)
keyo,cid,4,0               ! on Gauss point (from Program Controlled setting)
keyo,cid,9,1               ! ignore initial gaps/penetration
keyo,cid,7,0               ! No Prediction
rmod,tid,3,10.      ! FKN
rmod,tid,5,0.       ! ICONT
rmod,tid,6,0.       ! PINB
rmod,tid,10,0.      ! CNOF
rmod,tid,12,0.      ! FKT
rmod,tid,36,98      ! WB DSID
rmod,cid,3,10.      ! FKN
rmod,cid,5,0.       ! ICONT
rmod,cid,6,0.       ! PINB
rmod,cid,10,0.      ! CNOF
rmod,cid,12,0.      ! FKT
rmod,cid,36,98      ! WB DSID
/com,*********** Create Contact "Contact Region 12" ***********
*set,tid,39
*set,cid,38
r,tid
r,cid
et,tid,170
et,cid,174
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eblock,10,,,22
(15i9)
    14205       39       38       39        0    13284    13283    13263    13263    14022    13901    13263    13902
    14206       39       38       39        0    13263    13283    13262    13262    13901    13896    13262    13895
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-1
keyo,cid,8,2               ! auto create asymmetric contact (from Program Controlled setting)
keyo,cid,10,0              ! adjust contact stiffness each NR iteration (from Program Controlled setting)
keyo,cid,12,5              ! bonded always
keyo,cid,18,1              ! small sliding turned on by application
keyo,cid,2,0               ! augmented Lagrange (from Program Controlled setting)
keyo,cid,4,0               ! on Gauss point (from Program Controlled setting)
keyo,cid,9,1               ! ignore initial gaps/penetration
keyo,cid,7,0               ! No Prediction
rmod,tid,3,10.      ! FKN
rmod,tid,5,0.       ! ICONT
rmod,tid,6,0.       ! PINB
rmod,tid,10,0.      ! CNOF
rmod,tid,12,0.      ! FKT
rmod,tid,36,101     ! WB DSID
rmod,cid,3,10.      ! FKN
rmod,cid,5,0.       ! ICONT
rmod,cid,6,0.       ! PINB
rmod,cid,10,0.      ! CNOF
rmod,cid,12,0.      ! FKT
rmod,cid,36,101     ! WB DSID
/com,*********** Create Contact "Contact Region 13" ***********
*set,tid,41
*set,cid,40
r,tid
r,cid
et,tid,170
et,cid,174
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eblock,10,,,36
(15i9)
    14311       41       40       41        0    12685    12686    12754    12754    12847    12861    12754    12853
    14312       41       40       41        0    12686    12687    12755    12755    12855    12868    12755    12862
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-1
keyo,cid,8,2               ! auto create asymmetric contact (from Program Controlled setting)
keyo,cid,10,0              ! adjust contact stiffness each NR iteration (from Program Controlled setting)
keyo,cid,12,5              ! bonded always
keyo,cid,18,1              ! small sliding turned on by application
keyo,cid,2,0               ! augmented Lagrange (from Program Controlled setting)
keyo,cid,4,0               ! on Gauss point (from Program Controlled setting)
keyo,cid,9,1               ! ignore initial gaps/penetration
keyo,cid,7,0               ! No Prediction
rmod,tid,3,10.      ! FKN
rmod,tid,5,0.       ! ICONT
rmod,tid,6,0.       ! PINB
rmod,tid,10,0.      ! CNOF
rmod,tid,12,0.      ! FKT
rmod,tid,36,104     ! WB DSID
rmod,cid,3,10.      ! FKN
rmod,cid,5,0.       ! ICONT
rmod,cid,6,0.       ! PINB
rmod,cid,10,0.      ! CNOF
rmod,cid,12,0.      ! FKT
rmod,cid,36,104     ! WB DSID
/com,*********** Create Contact "Contact Region 14" ***********
*set,tid,43
*set,cid,42
r,tid
r,cid
et,tid,170
et,cid,174
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eblock,10,,,32
(15i9)
    14415       43       42       43        0    11094    11175    11202    11202    11399    11760    11202    11401
    14416       43       42       43        0    11175    11092    11202    11202    11382    11384    11202    11760
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-1
keyo,cid,8,2               ! auto create asymmetric contact (from Program Controlled setting)
keyo,cid,10,0              ! adjust contact stiffness each NR iteration (from Program Controlled setting)
keyo,cid,12,5              ! bonded always
keyo,cid,18,1              ! small sliding turned on by application
keyo,cid,2,0               ! augmented Lagrange (from Program Controlled setting)
keyo,cid,4,0               ! on Gauss point (from Program Controlled setting)
keyo,cid,9,1               ! ignore initial gaps/penetration
keyo,cid,7,0               ! No Prediction
rmod,tid,3,10.      ! FKN
rmod,tid,5,0.       ! ICONT
rmod,tid,6,0.       ! PINB
rmod,tid,10,0.      ! CNOF
rmod,tid,12,0.      ! FKT
rmod,tid,36,107     ! WB DSID
rmod,cid,3,10.      ! FKN
rmod,cid,5,0.       ! ICONT
rmod,cid,6,0.       ! PINB
rmod,cid,10,0.      ! CNOF
rmod,cid,12,0.      ! FKT
rmod,cid,36,107     ! WB DSID
/com,*********** Create Contact "Contact Region 15" ***********
*set,tid,45
*set,cid,44
r,tid
r,cid
et,tid,170
et,cid,174
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eblock,10,,,42
(15i9)
    14537       45       44       45        0    12701    12699    12729    12729    12947    12951    12729    12964
    14538       45       44       45        0    12702    12701    12730    12730    12961    12965    12730    12969
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-1
keyo,cid,8,2               ! auto create asymmetric contact (from Program Controlled setting)
keyo,cid,10,0              ! adjust contact stiffness each NR iteration (from Program Controlled setting)
keyo,cid,12,5              ! bonded always
keyo,cid,18,1              ! small sliding turned on by application
keyo,cid,2,0               ! augmented Lagrange (from Program Controlled setting)
keyo,cid,4,0               ! on Gauss point (from Program Controlled setting)
keyo,cid,9,1               ! ignore initial gaps/penetration
keyo,cid,7,0               ! No Prediction
rmod,tid,3,10.      ! FKN
rmod,tid,5,0.       ! ICONT
rmod,tid,6,0.       ! PINB
rmod,tid,10,0.      ! CNOF
rmod,tid,12,0.      ! FKT
rmod,tid,36,110     ! WB DSID
rmod,cid,3,10.      ! FKN
rmod,cid,5,0.       ! ICONT
rmod,cid,6,0.       ! PINB
rmod,cid,10,0.      ! CNOF
rmod,cid,12,0.      ! FKT
rmod,cid,36,110     ! WB DSID
/com,*********** Create Contact "Contact Region 16" ***********
*set,tid,47
*set,cid,46
r,tid
r,cid
et,tid,170
et,cid,174
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eblock,10,,,42
(15i9)
    14669       47       46       47        0    14513    14511    14541    14541    14759    14763    14541    14776
    14670       47       46       47        0    14514    14513    14542    14542    14773    14777    14542    14781
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-1
keyo,cid,8,2               ! auto create asymmetric contact (from Program Controlled setting)
keyo,cid,10,0              ! adjust contact stiffness each NR iteration (from Program Controlled setting)
keyo,cid,12,5              ! bonded always
keyo,cid,18,1              ! small sliding turned on by application
keyo,cid,2,0               ! augmented Lagrange (from Program Controlled setting)
keyo,cid,4,0               ! on Gauss point (from Program Controlled setting)
keyo,cid,9,1               ! ignore initial gaps/penetration
keyo,cid,7,0               ! No Prediction
rmod,tid,3,10.      ! FKN
rmod,tid,5,0.       ! ICONT
rmod,tid,6,0.       ! PINB
rmod,tid,10,0.      ! CNOF
rmod,tid,12,0.      ! FKT
rmod,tid,36,113     ! WB DSID
rmod,cid,3,10.      ! FKN
rmod,cid,5,0.       ! ICONT
rmod,cid,6,0.       ! PINB
rmod,cid,10,0.      ! CNOF
rmod,cid,12,0.      ! FKT
rmod,cid,36,113     ! WB DSID
nsel,all
esel,all
/com,*********** Fixed Supports ***********
CMBLOCK,_FIXEDSU,NODE,      365
(8i10)
      5116      5117      5118      5119      5120      5121      5122      5123
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cmsel,s,_FIXEDSU
d,all,all
nsel,all
fini
/solu
antype,2                   ! modal analysis
_thickRatio=0.267   ! Ratio of thick parts in the model
modopt,lanb,6
outres,erase
outres,all,none
outres,nsol,all
mxpand                    ! default expand in case of complex solution
dmpopt,esav,no
dmpopt,emat,no
dmpopt,full,no
! *********** WB SOLVE COMMAND ***********
! check interactive state
*get,ANSINTER_,active,,int
*if,ANSINTER_,ne,0,then
/eof
*endif
solve
/com *************** Write FE CONNECTORS *********
CEWRITE,file,ce,,INTE
*get,_nmodalsolproc,active,0,numcpu
fini
*get,_NSOLTHREADS,active,0,ntfs
*get,_NSOLPROCESSES,active,0,npfs
/post1
*dim,_direction,CHAR,6,1
_direction(1) = 'X'
_direction(2) = 'Y'
_direction(3) = 'Z'
_direction(4) = 'ROTX'
_direction(5) = 'ROTY'
_direction(6) = 'ROTZ'
*get,_lastLS,active,0,set,LSTP
*get,_beginset,active,0,set,nset,first,_lastLS
*get,_endset,active,0,set,nset,last,_lastLS
_nummodes = 0
*if,_endset,gt,0,then
_nummodes = _endset - _beginset + 1
*endif
*do,i_mode,1,_nummodes
   *do,j_component,1,6
			*get,PFACT_%i_mode%_%j_component%,MODE,%i_mode%,PFACT,,DIREC,_direction(%j_component%)
   *enddo
*enddo
*dim,_tmdirection,CHAR,6,1
_tmdirection(1) = 'X'
_tmdirection(2) = 'Y'
_tmdirection(3) = 'Z'
_tmdirection(4) = 'X'
_tmdirection(5) = 'Y'
_tmdirection(6) = 'Z'
*do,j_component,1,6
    *if,j_component,gt,3,then
        *get,TOTALMASS_%j_component%,ELEM,0,IOR,_tmdirection(%j_component%)
    *else
        *get,TOTALMASS_%j_component%,ELEM,0,MTOT,_tmdirection(%j_component%)
    *endif
*enddo
fini
