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/batch
! ANSYS input file written by Workbench version 2022 R2
! File used for geometry attach: C:\Users\Ahmet Burak Akyuz\Desktop\Table.STEP
/title,Bending_Study--Static Structural (A5)
/COM,/COM,     ANSYSMotion, 2022.2
/com,--- Data in consistent MKS units. See Solving Units in the help system for more information.
/units,MKS
/prep7
! Turn off shape checking because checks already performed inside WB mesher.
! See help system for more information.
SHPP,OFF,,NOWARN
etcon,set             ! allow ANSYS to choose best KEYOP's for 180x elements, resets any applicable keyopt to MAPDL defaults
/com,*********** Nodes for the whole assembly ***********
nblock,3,,17120
(1i9,3e20.9e3)
        1    -3.743977242E-02     1.270001699E-01     1.026000000E-01
        2    -3.743977242E-02     1.270001699E-01     1.012000000E-01
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-1
/com,*********** Elements for Body 1 "RealBase_Varsay_lan|Cut-Extrude1" ***********
et,1,187
eblock,19,solid,,669
(19i9)
        1        1        1        1        0        0        0        0       10        0     1474     3206     3398     3384     3292     3778     4602     3777     3774
     4230     4228
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-1
/com,*********** Elements for Body 2 "ServoMotor_Varsay_lan|Boss-Extrude5" ***********
et,2,187
eblock,19,solid,,812
(19i9)
        2        2        2        2        0        0        0        0       10        0     2851     6024     6064     6260     6063     6462     6702     6466     6461
     6695     6698
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-1
/com,*********** Elements for Body 3 "ServoMotor_Varsay_lan|Boss-Extrude5[2]" ***********
et,3,187
eblock,19,solid,,812
(19i9)
        3        3        3        3        0        0        0        0       10        0     3663     7587     7627     7823     7626     8025     8265     8029     8024
     8258     8261
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-1
/com,*********** Elements for Body 4 "Joint1_Varsay_lan|Boss-Extrude2" ***********
et,4,187
eblock,19,solid,,628
(19i9)
        4        4        4        4        0        0        0        0       10        0     5001    10395    10575    10536    10553    11022    11606    11018    11019
    11654    11604
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-1
/com,*********** Elements for Body 5 "Joint2_Varsay_lan|Boss-Extrude2" ***********
et,5,187
eblock,19,solid,,891
(19i9)
        5        5        5        5        0        0        0        0       10        0      583     1366     1594     1503     1589     2186     2834     2182     2185
     3103     2833
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-1
/com,*********** Elements for Body 6 "JointUnion_Varsay_lan|Boss-Extrude3" ***********
et,6,187
eblock,19,solid,,708
(19i9)
        6        6        6        6        0        0        0        0       10        0     2143     4745     4752     4849     4829     5608     5642     5612     5611
     5641     5979
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-1
/com,*********** Elements for Body 7 "NewConnectionForBall_Varsay_lan|Cut-Extrude3" ***********
et,7,187
eblock,19,solid,,291
(19i9)
        7        7        7        7        0        0        0        0       10        0        1      104      114      120      105      613      633      614      610
      615      618
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-1
/com,*********** Elements for Body 8 "NewConnectionforServo_Varsay_lan|Cut-Extrude11" ***********
et,8,187
eblock,19,solid,,263
(19i9)
        8        8        8        8        0        0        0        0       10        0     4475     9129     9235     9207     9140     9313     9681     9307     9304
     9405     9402
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-1
/com,*********** Elements for Body 9 "NewConnectionForBall_Varsay_lan|Cut-Extrude3[2]" ***********
et,9,187
eblock,19,solid,,291
(19i9)
        9        9        9        9        0        0        0        0       10        0      292      744      754      760      745     1253     1273     1254     1250
     1255     1258
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-1
/com,*********** Elements for Body 10 "NewConnectionforServo_Varsay_lan|Cut-Extrude11[2]" ***********
et,10,187
eblock,19,solid,,263
(19i9)
       10       10       10       10        0        0        0        0       10        0     4738     9732     9838     9810     9743     9916    10284     9910     9907
    10008    10005
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-1
/com,*********** Elements for Body 11 "Base_Varsay_lan|Cut-Extrude3" ***********
et,11,187
eblock,19,solid,,586
(19i9)
       11       11       11       11        0        0        0        0       10        0     5832    12309    12389    12312    12323    13166    13188    13159    13160
    13258    13184
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-1
/com,*********** Elements for Body 12 "NewAttempt_Varsay_lan|Cut-Extrude7" ***********
et,12,187
eblock,19,solid,,356
(19i9)
       12       12       12       12        0        0        0        0       10        0     6418    13616    13617    13635    13623    14254    14261    14258    14256
    14259    14275
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-1
/com,*********** Elements for Body 13 "NewAttempt_Varsay_lan|Cut-Extrude7[2]" ***********
et,13,187
eblock,19,solid,,356
(19i9)
       13       13       13       13        0        0        0        0       10        0     6774    14416    14417    14435    14423    15054    15061    15058    15056
    15059    15075
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-1
/com,*********** Elements for Body 14 "NewAttempt2_Varsay_lan|Boss-Extrude3" ***********
et,14,187
eblock,19,solid,,203
(19i9)
       14       14       14       14        0        0        0        0       10        0     5629    11711    11719    11740    11766    12010    12028    12013    12015
    12032    12085
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-1
/com,*********** Elements for Body 15 "NewAttempt2_Varsay_lan|Boss-Extrude3[2]" ***********
et,15,187
eblock,19,solid,,203
(19i9)
       15       15       15       15        0        0        0        0       10        0     7130    15123    15131    15152    15178    15422    15440    15425    15427
    15444    15497
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-1
/com,*********** Send User Defined Coordinate System(s) ***********
csys,0
toffst,273.15,  ! Temperature offset from absolute zero
/com,*********** Set Reference Temperature ***********
tref,22.
/com,*********** Send Materials ***********
Temperature = 'TEMP' ! Temperature
MP,DENS,1,7850,	! kg m^-3
MP,ALPX,1,1.2e-05,	! C^-1
MP,C,1,434,	! J kg^-1 C^-1
MP,KXX,1,60.5,	! W m^-1 C^-1
MP,RSVX,1,1.7e-07,	! kg m^3 A^-2 s^-3
MP,EX,1,200000000000,	! Pa
MP,NUXY,1,0.3,
MP,MURX,1,10000,

Temperature = 'TEMP' ! Temperature
MP,DENS,2,7850,	! kg m^-3
MP,ALPX,2,1.2e-05,	! C^-1
MP,C,2,434,	! J kg^-1 C^-1
MP,KXX,2,60.5,	! W m^-1 C^-1
MP,RSVX,2,1.7e-07,	! kg m^3 A^-2 s^-3
MP,EX,2,200000000000,	! Pa
MP,NUXY,2,0.3,
MP,MURX,2,10000,

Temperature = 'TEMP' ! Temperature
MP,DENS,3,7850,	! kg m^-3
MP,ALPX,3,1.2e-05,	! C^-1
MP,C,3,434,	! J kg^-1 C^-1
MP,KXX,3,60.5,	! W m^-1 C^-1
MP,RSVX,3,1.7e-07,	! kg m^3 A^-2 s^-3
MP,EX,3,200000000000,	! Pa
MP,NUXY,3,0.3,
MP,MURX,3,10000,

Temperature = 'TEMP' ! Temperature
MP,DENS,4,7850,	! kg m^-3
MP,ALPX,4,1.2e-05,	! C^-1
MP,C,4,434,	! J kg^-1 C^-1
MP,KXX,4,60.5,	! W m^-1 C^-1
MP,RSVX,4,1.7e-07,	! kg m^3 A^-2 s^-3
MP,EX,4,200000000000,	! Pa
MP,NUXY,4,0.3,
MP,MURX,4,10000,

Temperature = 'TEMP' ! Temperature
MP,DENS,5,7850,	! kg m^-3
MP,ALPX,5,1.2e-05,	! C^-1
MP,C,5,434,	! J kg^-1 C^-1
MP,KXX,5,60.5,	! W m^-1 C^-1
MP,RSVX,5,1.7e-07,	! kg m^3 A^-2 s^-3
MP,EX,5,200000000000,	! Pa
MP,NUXY,5,0.3,
MP,MURX,5,10000,

Temperature = 'TEMP' ! Temperature
MP,DENS,6,7850,	! kg m^-3
MP,ALPX,6,1.2e-05,	! C^-1
MP,C,6,434,	! J kg^-1 C^-1
MP,KXX,6,60.5,	! W m^-1 C^-1
MP,RSVX,6,1.7e-07,	! kg m^3 A^-2 s^-3
MP,EX,6,200000000000,	! Pa
MP,NUXY,6,0.3,
MP,MURX,6,10000,

Temperature = 'TEMP' ! Temperature
MP,DENS,7,7850,	! kg m^-3
MP,ALPX,7,1.2e-05,	! C^-1
MP,C,7,434,	! J kg^-1 C^-1
MP,KXX,7,60.5,	! W m^-1 C^-1
MP,RSVX,7,1.7e-07,	! kg m^3 A^-2 s^-3
MP,EX,7,200000000000,	! Pa
MP,NUXY,7,0.3,
MP,MURX,7,10000,

Temperature = 'TEMP' ! Temperature
MP,DENS,8,7850,	! kg m^-3
MP,ALPX,8,1.2e-05,	! C^-1
MP,C,8,434,	! J kg^-1 C^-1
MP,KXX,8,60.5,	! W m^-1 C^-1
MP,RSVX,8,1.7e-07,	! kg m^3 A^-2 s^-3
MP,EX,8,200000000000,	! Pa
MP,NUXY,8,0.3,
MP,MURX,8,10000,

Temperature = 'TEMP' ! Temperature
MP,DENS,9,7850,	! kg m^-3
MP,ALPX,9,1.2e-05,	! C^-1
MP,C,9,434,	! J kg^-1 C^-1
MP,KXX,9,60.5,	! W m^-1 C^-1
MP,RSVX,9,1.7e-07,	! kg m^3 A^-2 s^-3
MP,EX,9,200000000000,	! Pa
MP,NUXY,9,0.3,
MP,MURX,9,10000,

Temperature = 'TEMP' ! Temperature
MP,DENS,10,7850,	! kg m^-3
MP,ALPX,10,1.2e-05,	! C^-1
MP,C,10,434,	! J kg^-1 C^-1
MP,KXX,10,60.5,	! W m^-1 C^-1
MP,RSVX,10,1.7e-07,	! kg m^3 A^-2 s^-3
MP,EX,10,200000000000,	! Pa
MP,NUXY,10,0.3,
MP,MURX,10,10000,

Temperature = 'TEMP' ! Temperature
MP,DENS,11,7850,	! kg m^-3
MP,ALPX,11,1.2e-05,	! C^-1
MP,C,11,434,	! J kg^-1 C^-1
MP,KXX,11,60.5,	! W m^-1 C^-1
MP,RSVX,11,1.7e-07,	! kg m^3 A^-2 s^-3
MP,EX,11,200000000000,	! Pa
MP,NUXY,11,0.3,
MP,MURX,11,10000,

Temperature = 'TEMP' ! Temperature
MP,DENS,12,7850,	! kg m^-3
MP,ALPX,12,1.2e-05,	! C^-1
MP,C,12,434,	! J kg^-1 C^-1
MP,KXX,12,60.5,	! W m^-1 C^-1
MP,RSVX,12,1.7e-07,	! kg m^3 A^-2 s^-3
MP,EX,12,200000000000,	! Pa
MP,NUXY,12,0.3,
MP,MURX,12,10000,

Temperature = 'TEMP' ! Temperature
MP,DENS,13,7850,	! kg m^-3
MP,ALPX,13,1.2e-05,	! C^-1
MP,C,13,434,	! J kg^-1 C^-1
MP,KXX,13,60.5,	! W m^-1 C^-1
MP,RSVX,13,1.7e-07,	! kg m^3 A^-2 s^-3
MP,EX,13,200000000000,	! Pa
MP,NUXY,13,0.3,
MP,MURX,13,10000,

Temperature = 'TEMP' ! Temperature
MP,DENS,14,7850,	! kg m^-3
MP,ALPX,14,1.2e-05,	! C^-1
MP,C,14,434,	! J kg^-1 C^-1
MP,KXX,14,60.5,	! W m^-1 C^-1
MP,RSVX,14,1.7e-07,	! kg m^3 A^-2 s^-3
MP,EX,14,200000000000,	! Pa
MP,NUXY,14,0.3,
MP,MURX,14,10000,

Temperature = 'TEMP' ! Temperature
MP,DENS,15,7850,	! kg m^-3
MP,ALPX,15,1.2e-05,	! C^-1
MP,C,15,434,	! J kg^-1 C^-1
MP,KXX,15,60.5,	! W m^-1 C^-1
MP,RSVX,15,1.7e-07,	! kg m^3 A^-2 s^-3
MP,EX,15,200000000000,	! Pa
MP,NUXY,15,0.3,
MP,MURX,15,10000,

!************************* Model Summary ********************
!RealBase_Varsay_lan|Cut-Extrude1,	Structural Steel,	matid,	1
!ServoMotor_Varsay_lan|Boss-Extrude5,	Structural Steel,	matid,	2
!ServoMotor_Varsay_lan|Boss-Extrude5[2],	Structural Steel,	matid,	3
!Joint1_Varsay_lan|Boss-Extrude2,	Structural Steel,	matid,	4
!Joint2_Varsay_lan|Boss-Extrude2,	Structural Steel,	matid,	5
!JointUnion_Varsay_lan|Boss-Extrude3,	Structural Steel,	matid,	6
!NewConnectionForBall_Varsay_lan|Cut-Extrude3,	Structural Steel,	matid,	7
!NewConnectionforServo_Varsay_lan|Cut-Extrude11,	Structural Steel,	matid,	8
!NewConnectionForBall_Varsay_lan|Cut-Extrude3[2],	Structural Steel,	matid,	9
!NewConnectionforServo_Varsay_lan|Cut-Extrude11[2],	Structural Steel,	matid,	10
!Base_Varsay_lan|Cut-Extrude3,	Structural Steel,	matid,	11
!NewAttempt_Varsay_lan|Cut-Extrude7,	Structural Steel,	matid,	12
!NewAttempt_Varsay_lan|Cut-Extrude7[2],	Structural Steel,	matid,	13
!NewAttempt2_Varsay_lan|Boss-Extrude3,	Structural Steel,	matid,	14
!NewAttempt2_Varsay_lan|Boss-Extrude3[2],	Structural Steel,	matid,	15
!************************* End Model Summary ********************
/com,*********** Create Contact "Contact Region" ***********
*set,tid,17
*set,cid,16
r,tid
r,cid
et,tid,170
et,cid,174
eblock,10,,,16
(15i9)
    12431       17       17       17        0     3247     3248     3278     3278     3943     3951     3278     3945
    12432       17       17       17        0     3248     3277     3278     3278     3950     4115     3278     3951
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-1
eblock,10,,,16
(15i9)
    12447       16       16       16        0     3247     3248     3278     3278     3943     3951     3278     3945
    12448       16       16       16        0     3248     3277     3278     3278     3950     4115     3278     3951
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-1
eblock,10,,,28
(15i9)
    12463       16       17       16        0     6023     6063     6057     6057     6457     6673     6057     6456
    12464       16       17       16        0     6056     6057     6063     6063     6669     6673     6063     6671
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-1
eblock,10,,,28
(15i9)
    12491       17       16       17        0     6023     6063     6057     6057     6457     6673     6057     6456
    12492       17       16       17        0     6056     6057     6063     6063     6669     6673     6063     6671
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-1
keyo,cid,8,2               ! auto create asymmetric contact (from Program Controlled setting)
keyo,cid,10,0              ! adjust contact stiffness each NR iteration (from Program Controlled setting)
keyo,cid,12,5              ! bonded always
keyo,cid,18,1              ! small sliding turned on by application
keyo,cid,2,0               ! augmented Lagrange (from Program Controlled setting)
keyo,cid,4,0               ! on Gauss point (from Program Controlled setting)
keyo,cid,9,1               ! ignore initial gaps/penetration
keyo,cid,7,0               ! No Prediction
rmod,tid,3,10.      ! FKN
rmod,tid,5,0.       ! ICONT
rmod,tid,6,0.       ! PINB
rmod,tid,10,0.      ! CNOF
rmod,tid,12,0.      ! FKT
rmod,tid,36,68      ! WB DSID
rmod,cid,3,10.      ! FKN
rmod,cid,5,0.       ! ICONT
rmod,cid,6,0.       ! PINB
rmod,cid,10,0.      ! CNOF
rmod,cid,12,0.      ! FKT
rmod,cid,36,68      ! WB DSID
/com,*********** Create Contact "Contact Region 2" ***********
*set,tid,19
*set,cid,18
r,tid
r,cid
et,tid,170
et,cid,174
eblock,10,,,16
(15i9)
    12519       19       19       19        0     3243     3283     3285     3285     3926     4152     3285     3927
    12520       19       19       19        0     3241     3285     3284     3284     3915     4162     3284     3914
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-1
eblock,10,,,16
(15i9)
    12535       18       18       18        0     3243     3283     3285     3285     3926     4152     3285     3927
    12536       18       18       18        0     3241     3285     3284     3284     3915     4162     3284     3914
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-1
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eblock,10,,,28
(15i9)
    12579       19       18       19        0     7623     7626     7760     7760     8245     8259     7760     8246
    12580       19       18       19        0     7617     7621     7760     7760     8225     8239     7760     8226
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-1
keyo,cid,8,2               ! auto create asymmetric contact (from Program Controlled setting)
keyo,cid,10,0              ! adjust contact stiffness each NR iteration (from Program Controlled setting)
keyo,cid,12,5              ! bonded always
keyo,cid,18,1              ! small sliding turned on by application
keyo,cid,2,0               ! augmented Lagrange (from Program Controlled setting)
keyo,cid,4,0               ! on Gauss point (from Program Controlled setting)
keyo,cid,9,1               ! ignore initial gaps/penetration
keyo,cid,7,0               ! No Prediction
rmod,tid,3,10.      ! FKN
rmod,tid,5,0.       ! ICONT
rmod,tid,6,0.       ! PINB
rmod,tid,10,0.      ! CNOF
rmod,tid,12,0.      ! FKT
rmod,tid,36,71      ! WB DSID
rmod,cid,3,10.      ! FKN
rmod,cid,5,0.       ! ICONT
rmod,cid,6,0.       ! PINB
rmod,cid,10,0.      ! CNOF
rmod,cid,12,0.      ! FKT
rmod,cid,36,71      ! WB DSID
/com,*********** Create Contact "Contact Region 3" ***********
*set,tid,21
*set,cid,20
r,tid
r,cid
et,tid,170
et,cid,174
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eblock,10,,,68
(15i9)
    12747       21       20       21        0    10440    10435    10436    10436    11189    11188    10436    11193
    12748       21       20       21        0    10433    10437    10432    10432    11180    11177    10432    11176
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-1
keyo,cid,8,2               ! auto create asymmetric contact (from Program Controlled setting)
keyo,cid,10,0              ! adjust contact stiffness each NR iteration (from Program Controlled setting)
keyo,cid,12,5              ! bonded always
keyo,cid,18,1              ! small sliding turned on by application
keyo,cid,2,0               ! augmented Lagrange (from Program Controlled setting)
keyo,cid,4,0               ! on Gauss point (from Program Controlled setting)
keyo,cid,9,1               ! ignore initial gaps/penetration
keyo,cid,7,0               ! No Prediction
rmod,tid,3,10.      ! FKN
rmod,tid,5,0.       ! ICONT
rmod,tid,6,0.       ! PINB
rmod,tid,10,0.      ! CNOF
rmod,tid,12,0.      ! FKT
rmod,tid,36,74      ! WB DSID
rmod,cid,3,10.      ! FKN
rmod,cid,5,0.       ! ICONT
rmod,cid,6,0.       ! PINB
rmod,cid,10,0.      ! CNOF
rmod,cid,12,0.      ! FKT
rmod,cid,36,74      ! WB DSID
/com,*********** Create Contact "Contact Region 4" ***********
*set,tid,23
*set,cid,22
r,tid
r,cid
et,tid,170
et,cid,174
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eblock,10,,,12
(15i9)
    12851       23       22       23        0     9126     9203     9121     9121     9290     9244     9121     9237
    12852       23       22       23        0     9203     9205     9206     9206     9672     9677     9206     9673
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-1
keyo,cid,8,2               ! auto create asymmetric contact (from Program Controlled setting)
keyo,cid,10,0              ! adjust contact stiffness each NR iteration (from Program Controlled setting)
keyo,cid,12,5              ! bonded always
keyo,cid,18,1              ! small sliding turned on by application
keyo,cid,2,0               ! augmented Lagrange (from Program Controlled setting)
keyo,cid,4,0               ! on Gauss point (from Program Controlled setting)
keyo,cid,9,1               ! ignore initial gaps/penetration
keyo,cid,7,0               ! No Prediction
rmod,tid,3,10.      ! FKN
rmod,tid,5,0.       ! ICONT
rmod,tid,6,0.       ! PINB
rmod,tid,10,0.      ! CNOF
rmod,tid,12,0.      ! FKT
rmod,tid,36,77      ! WB DSID
rmod,cid,3,10.      ! FKN
rmod,cid,5,0.       ! ICONT
rmod,cid,6,0.       ! PINB
rmod,cid,10,0.      ! CNOF
rmod,cid,12,0.      ! FKT
rmod,cid,36,77      ! WB DSID
/com,*********** Create Contact "Contact Region 5" ***********
*set,tid,25
*set,cid,24
r,tid
r,cid
et,tid,170
et,cid,174
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eblock,10,,,12
(15i9)
    12899       25       24       25        0     9729     9806     9724     9724     9893     9847     9724     9840
    12900       25       24       25        0     9806     9808     9809     9809    10275    10280     9809    10276
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-1
keyo,cid,8,2               ! auto create asymmetric contact (from Program Controlled setting)
keyo,cid,10,0              ! adjust contact stiffness each NR iteration (from Program Controlled setting)
keyo,cid,12,5              ! bonded always
keyo,cid,18,1              ! small sliding turned on by application
keyo,cid,2,0               ! augmented Lagrange (from Program Controlled setting)
keyo,cid,4,0               ! on Gauss point (from Program Controlled setting)
keyo,cid,9,1               ! ignore initial gaps/penetration
keyo,cid,7,0               ! No Prediction
rmod,tid,3,10.      ! FKN
rmod,tid,5,0.       ! ICONT
rmod,tid,6,0.       ! PINB
rmod,tid,10,0.      ! CNOF
rmod,tid,12,0.      ! FKT
rmod,tid,36,80      ! WB DSID
rmod,cid,3,10.      ! FKN
rmod,cid,5,0.       ! ICONT
rmod,cid,6,0.       ! PINB
rmod,cid,10,0.      ! CNOF
rmod,cid,12,0.      ! FKT
rmod,cid,36,80      ! WB DSID
/com,*********** Create Contact "Contact Region 6" ***********
*set,tid,27
*set,cid,26
r,tid
r,cid
et,tid,170
et,cid,174
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eblock,10,,,80
(15i9)
    13131       27       26       27        0     4617     4619     4621     4621     4920     4931     4621     4921
    13132       27       26       27        0     4618     4621     4622     4622     4925     4954     4622     4926
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-1
keyo,cid,8,2               ! auto create asymmetric contact (from Program Controlled setting)
keyo,cid,10,0              ! adjust contact stiffness each NR iteration (from Program Controlled setting)
keyo,cid,12,5              ! bonded always
keyo,cid,18,1              ! small sliding turned on by application
keyo,cid,2,0               ! augmented Lagrange (from Program Controlled setting)
keyo,cid,4,0               ! on Gauss point (from Program Controlled setting)
keyo,cid,9,1               ! ignore initial gaps/penetration
keyo,cid,7,0               ! No Prediction
rmod,tid,3,10.      ! FKN
rmod,tid,5,0.       ! ICONT
rmod,tid,6,0.       ! PINB
rmod,tid,10,0.      ! CNOF
rmod,tid,12,0.      ! FKT
rmod,tid,36,83      ! WB DSID
rmod,cid,3,10.      ! FKN
rmod,cid,5,0.       ! ICONT
rmod,cid,6,0.       ! PINB
rmod,cid,10,0.      ! CNOF
rmod,cid,12,0.      ! FKT
rmod,cid,36,83      ! WB DSID
/com,*********** Create Contact "Contact Region 7" ***********
*set,tid,29
*set,cid,28
r,tid
r,cid
et,tid,170
et,cid,174
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eblock,10,,,70
(15i9)
    13453       29       28       29        0     4624     4697     4627     4627     4983     5011     4627     4980
    13454       29       28       29        0     4697     4698     4714     4714     5431     5440     4714     5432
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-1
keyo,cid,8,2               ! auto create asymmetric contact (from Program Controlled setting)
keyo,cid,10,0              ! adjust contact stiffness each NR iteration (from Program Controlled setting)
keyo,cid,12,5              ! bonded always
keyo,cid,18,1              ! small sliding turned on by application
keyo,cid,2,0               ! augmented Lagrange (from Program Controlled setting)
keyo,cid,4,0               ! on Gauss point (from Program Controlled setting)
keyo,cid,9,1               ! ignore initial gaps/penetration
keyo,cid,7,0               ! No Prediction
rmod,tid,3,10.      ! FKN
rmod,tid,5,0.       ! ICONT
rmod,tid,6,0.       ! PINB
rmod,tid,10,0.      ! CNOF
rmod,tid,12,0.      ! FKT
rmod,tid,36,86      ! WB DSID
rmod,cid,3,10.      ! FKN
rmod,cid,5,0.       ! ICONT
rmod,cid,6,0.       ! PINB
rmod,cid,10,0.      ! CNOF
rmod,cid,12,0.      ! FKT
rmod,cid,36,86      ! WB DSID
/com,*********** Create Contact "Contact Region 8" ***********
*set,tid,31
*set,cid,30
r,tid
r,cid
et,tid,170
et,cid,174
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eblock,10,,,22
(15i9)
    13641       31       30       31        0    12280    12276    12274    12274    12960    12950    12274    12951
    13642       31       30       31        0    12283    12270    12276    12276    12930    12928    12276    12961
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-1
keyo,cid,8,2               ! auto create asymmetric contact (from Program Controlled setting)
keyo,cid,10,0              ! adjust contact stiffness each NR iteration (from Program Controlled setting)
keyo,cid,12,5              ! bonded always
keyo,cid,18,1              ! small sliding turned on by application
keyo,cid,2,0               ! augmented Lagrange (from Program Controlled setting)
keyo,cid,4,0               ! on Gauss point (from Program Controlled setting)
keyo,cid,9,1               ! ignore initial gaps/penetration
keyo,cid,7,0               ! No Prediction
rmod,tid,3,10.      ! FKN
rmod,tid,5,0.       ! ICONT
rmod,tid,6,0.       ! PINB
rmod,tid,10,0.      ! CNOF
rmod,tid,12,0.      ! FKT
rmod,tid,36,89      ! WB DSID
rmod,cid,3,10.      ! FKN
rmod,cid,5,0.       ! ICONT
rmod,cid,6,0.       ! PINB
rmod,cid,10,0.      ! CNOF
rmod,cid,12,0.      ! FKT
rmod,cid,36,89      ! WB DSID
/com,*********** Create Contact "Contact Region 9" ***********
*set,tid,33
*set,cid,32
r,tid
r,cid
et,tid,170
et,cid,174
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eblock,10,,,22
(15i9)
    13813       33       32       33        0    12296    12258    12295    12295    12855    12854    12295    13088
    13814       33       32       33        0    12259    12258    12296    12296    12853    12855    12296    12862
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-1
keyo,cid,8,2               ! auto create asymmetric contact (from Program Controlled setting)
keyo,cid,10,0              ! adjust contact stiffness each NR iteration (from Program Controlled setting)
keyo,cid,12,5              ! bonded always
keyo,cid,18,1              ! small sliding turned on by application
keyo,cid,2,0               ! augmented Lagrange (from Program Controlled setting)
keyo,cid,4,0               ! on Gauss point (from Program Controlled setting)
keyo,cid,9,1               ! ignore initial gaps/penetration
keyo,cid,7,0               ! No Prediction
rmod,tid,3,10.      ! FKN
rmod,tid,5,0.       ! ICONT
rmod,tid,6,0.       ! PINB
rmod,tid,10,0.      ! CNOF
rmod,tid,12,0.      ! FKT
rmod,tid,36,92      ! WB DSID
rmod,cid,3,10.      ! FKN
rmod,cid,5,0.       ! ICONT
rmod,cid,6,0.       ! PINB
rmod,cid,10,0.      ! CNOF
rmod,cid,12,0.      ! FKT
rmod,cid,36,92      ! WB DSID
/com,*********** Create Contact "Contact Region 10" ***********
*set,tid,35
*set,cid,34
r,tid
r,cid
et,tid,170
et,cid,174
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eblock,10,,,36
(15i9)
    13919       35       34       35        0    15100    15101    15169    15169    15262    15276    15169    15268
    13920       35       34       35        0    15101    15102    15170    15170    15270    15283    15170    15277
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-1
keyo,cid,8,2               ! auto create asymmetric contact (from Program Controlled setting)
keyo,cid,10,0              ! adjust contact stiffness each NR iteration (from Program Controlled setting)
keyo,cid,12,5              ! bonded always
keyo,cid,18,1              ! small sliding turned on by application
keyo,cid,2,0               ! augmented Lagrange (from Program Controlled setting)
keyo,cid,4,0               ! on Gauss point (from Program Controlled setting)
keyo,cid,9,1               ! ignore initial gaps/penetration
keyo,cid,7,0               ! No Prediction
rmod,tid,3,10.      ! FKN
rmod,tid,5,0.       ! ICONT
rmod,tid,6,0.       ! PINB
rmod,tid,10,0.      ! CNOF
rmod,tid,12,0.      ! FKT
rmod,tid,36,95      ! WB DSID
rmod,cid,3,10.      ! FKN
rmod,cid,5,0.       ! ICONT
rmod,cid,6,0.       ! PINB
rmod,cid,10,0.      ! CNOF
rmod,cid,12,0.      ! FKT
rmod,cid,36,95      ! WB DSID
/com,*********** Create Contact "Contact Region 11" ***********
*set,tid,37
*set,cid,36
r,tid
r,cid
et,tid,170
et,cid,174
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eblock,10,,,32
(15i9)
    14023       37       36       37        0    14309    14390    14417    14417    14614    14975    14417    14616
    14024       37       36       37        0    14390    14307    14417    14417    14597    14599    14417    14975
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-1
keyo,cid,8,2               ! auto create asymmetric contact (from Program Controlled setting)
keyo,cid,10,0              ! adjust contact stiffness each NR iteration (from Program Controlled setting)
keyo,cid,12,5              ! bonded always
keyo,cid,18,1              ! small sliding turned on by application
keyo,cid,2,0               ! augmented Lagrange (from Program Controlled setting)
keyo,cid,4,0               ! on Gauss point (from Program Controlled setting)
keyo,cid,9,1               ! ignore initial gaps/penetration
keyo,cid,7,0               ! No Prediction
rmod,tid,3,10.      ! FKN
rmod,tid,5,0.       ! ICONT
rmod,tid,6,0.       ! PINB
rmod,tid,10,0.      ! CNOF
rmod,tid,12,0.      ! FKT
rmod,tid,36,98      ! WB DSID
rmod,cid,3,10.      ! FKN
rmod,cid,5,0.       ! ICONT
rmod,cid,6,0.       ! PINB
rmod,cid,10,0.      ! CNOF
rmod,cid,12,0.      ! FKT
rmod,cid,36,98      ! WB DSID
/com,*********** Create Contact "Contact Region 12" ***********
*set,tid,39
*set,cid,38
r,tid
r,cid
et,tid,170
et,cid,174
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eblock,10,,,22
(15i9)
    14205       39       38       39        0    12287    12286    12266    12266    13025    12904    12266    12905
    14206       39       38       39        0    12266    12286    12265    12265    12904    12899    12265    12898
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-1
keyo,cid,8,2               ! auto create asymmetric contact (from Program Controlled setting)
keyo,cid,10,0              ! adjust contact stiffness each NR iteration (from Program Controlled setting)
keyo,cid,12,5              ! bonded always
keyo,cid,18,1              ! small sliding turned on by application
keyo,cid,2,0               ! augmented Lagrange (from Program Controlled setting)
keyo,cid,4,0               ! on Gauss point (from Program Controlled setting)
keyo,cid,9,1               ! ignore initial gaps/penetration
keyo,cid,7,0               ! No Prediction
rmod,tid,3,10.      ! FKN
rmod,tid,5,0.       ! ICONT
rmod,tid,6,0.       ! PINB
rmod,tid,10,0.      ! CNOF
rmod,tid,12,0.      ! FKT
rmod,tid,36,101     ! WB DSID
rmod,cid,3,10.      ! FKN
rmod,cid,5,0.       ! ICONT
rmod,cid,6,0.       ! PINB
rmod,cid,10,0.      ! CNOF
rmod,cid,12,0.      ! FKT
rmod,cid,36,101     ! WB DSID
/com,*********** Create Contact "Contact Region 13" ***********
*set,tid,41
*set,cid,40
r,tid
r,cid
et,tid,170
et,cid,174
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eblock,10,,,36
(15i9)
    14311       41       40       41        0    11688    11689    11757    11757    11850    11864    11757    11856
    14312       41       40       41        0    11689    11690    11758    11758    11858    11871    11758    11865
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-1
keyo,cid,8,2               ! auto create asymmetric contact (from Program Controlled setting)
keyo,cid,10,0              ! adjust contact stiffness each NR iteration (from Program Controlled setting)
keyo,cid,12,5              ! bonded always
keyo,cid,18,1              ! small sliding turned on by application
keyo,cid,2,0               ! augmented Lagrange (from Program Controlled setting)
keyo,cid,4,0               ! on Gauss point (from Program Controlled setting)
keyo,cid,9,1               ! ignore initial gaps/penetration
keyo,cid,7,0               ! No Prediction
rmod,tid,3,10.      ! FKN
rmod,tid,5,0.       ! ICONT
rmod,tid,6,0.       ! PINB
rmod,tid,10,0.      ! CNOF
rmod,tid,12,0.      ! FKT
rmod,tid,36,104     ! WB DSID
rmod,cid,3,10.      ! FKN
rmod,cid,5,0.       ! ICONT
rmod,cid,6,0.       ! PINB
rmod,cid,10,0.      ! CNOF
rmod,cid,12,0.      ! FKT
rmod,cid,36,104     ! WB DSID
/com,*********** Create Contact "Contact Region 14" ***********
*set,tid,43
*set,cid,42
r,tid
r,cid
et,tid,170
et,cid,174
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eblock,10,,,32
(15i9)
    14415       43       42       43        0    13509    13590    13617    13617    13814    14175    13617    13816
    14416       43       42       43        0    13590    13507    13617    13617    13797    13799    13617    14175
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-1
keyo,cid,8,2               ! auto create asymmetric contact (from Program Controlled setting)
keyo,cid,10,0              ! adjust contact stiffness each NR iteration (from Program Controlled setting)
keyo,cid,12,5              ! bonded always
keyo,cid,18,1              ! small sliding turned on by application
keyo,cid,2,0               ! augmented Lagrange (from Program Controlled setting)
keyo,cid,4,0               ! on Gauss point (from Program Controlled setting)
keyo,cid,9,1               ! ignore initial gaps/penetration
keyo,cid,7,0               ! No Prediction
rmod,tid,3,10.      ! FKN
rmod,tid,5,0.       ! ICONT
rmod,tid,6,0.       ! PINB
rmod,tid,10,0.      ! CNOF
rmod,tid,12,0.      ! FKT
rmod,tid,36,107     ! WB DSID
rmod,cid,3,10.      ! FKN
rmod,cid,5,0.       ! ICONT
rmod,cid,6,0.       ! PINB
rmod,cid,10,0.      ! CNOF
rmod,cid,12,0.      ! FKT
rmod,cid,36,107     ! WB DSID
/com,*********** Create Contact "Contact Region 15" ***********
*set,tid,45
*set,cid,44
r,tid
r,cid
et,tid,170
et,cid,174
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eblock,10,,,42
(15i9)
    14537       45       44       45        0    11704    11702    11732    11732    11950    11954    11732    11967
    14538       45       44       45        0    11705    11704    11733    11733    11964    11968    11733    11972
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-1
keyo,cid,8,2               ! auto create asymmetric contact (from Program Controlled setting)
keyo,cid,10,0              ! adjust contact stiffness each NR iteration (from Program Controlled setting)
keyo,cid,12,5              ! bonded always
keyo,cid,18,1              ! small sliding turned on by application
keyo,cid,2,0               ! augmented Lagrange (from Program Controlled setting)
keyo,cid,4,0               ! on Gauss point (from Program Controlled setting)
keyo,cid,9,1               ! ignore initial gaps/penetration
keyo,cid,7,0               ! No Prediction
rmod,tid,3,10.      ! FKN
rmod,tid,5,0.       ! ICONT
rmod,tid,6,0.       ! PINB
rmod,tid,10,0.      ! CNOF
rmod,tid,12,0.      ! FKT
rmod,tid,36,110     ! WB DSID
rmod,cid,3,10.      ! FKN
rmod,cid,5,0.       ! ICONT
rmod,cid,6,0.       ! PINB
rmod,cid,10,0.      ! CNOF
rmod,cid,12,0.      ! FKT
rmod,cid,36,110     ! WB DSID
/com,*********** Create Contact "Contact Region 16" ***********
*set,tid,47
*set,cid,46
r,tid
r,cid
et,tid,170
et,cid,174
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eblock,10,,,42
(15i9)
    14669       47       46       47        0    15116    15114    15144    15144    15362    15366    15144    15379
    14670       47       46       47        0    15117    15116    15145    15145    15376    15380    15145    15384
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-1
keyo,cid,8,2               ! auto create asymmetric contact (from Program Controlled setting)
keyo,cid,10,0              ! adjust contact stiffness each NR iteration (from Program Controlled setting)
keyo,cid,12,5              ! bonded always
keyo,cid,18,1              ! small sliding turned on by application
keyo,cid,2,0               ! augmented Lagrange (from Program Controlled setting)
keyo,cid,4,0               ! on Gauss point (from Program Controlled setting)
keyo,cid,9,1               ! ignore initial gaps/penetration
keyo,cid,7,0               ! No Prediction
rmod,tid,3,10.      ! FKN
rmod,tid,5,0.       ! ICONT
rmod,tid,6,0.       ! PINB
rmod,tid,10,0.      ! CNOF
rmod,tid,12,0.      ! FKT
rmod,tid,36,113     ! WB DSID
rmod,cid,3,10.      ! FKN
rmod,cid,5,0.       ! ICONT
rmod,cid,6,0.       ! PINB
rmod,cid,10,0.      ! CNOF
rmod,cid,12,0.      ! FKT
rmod,cid,36,113     ! WB DSID
nsel,all
esel,all
/com,*********** Fixed Supports ***********
CMBLOCK,_FIXEDSU,NODE,      365
(8i10)
      3125      3126      3127      3128      3129      3130      3131      3132
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cmsel,s,_FIXEDSU
d,all,all
nsel,all
/com,*********** Define Vertex Force Using Follower Elements ***********
et,48,201
keyo,48,1,1           ! Keep the direction constant
keyo,48,2,1           ! Apply Forces only, not moment
mat,48
real,48
type,48
en,14711,12207
r,48
rmod,48,1,1.0,              ! FX
mat,49
real,49
type,48
en,14712,12207
r,49
rmod,49,2,1.0,              ! FY
mat,50
real,50
type,48
en,14713,12207
r,50
rmod,50,3,1.0,              ! FZ
fini
/com,****************************************************************************
/com,*************************    SOLUTION       ********************************
/com,****************************************************************************
/solu
antype,0                   ! static analysis
_thickRatio=0.267   ! Ratio of thick parts in the model
eqsl,sparse,,,,,1
cntr,print,1               ! print out contact info and also make no initial contact an error
dmpoption,emat,no             ! Don't combine emat file for DANSYS
dmpoption,esav,no             ! Don't combine esav file for DANSYS
nldiag,cont,iter           ! print out contact info each equilibrium iteration
rescontrol,,none                 ! Do not keep any restart files
/com,****************************************************
/com,******************* SOLVE FOR LS 1 OF 1 ****************
esel,s,real,,48
sfe,all,1,pres,1,0.
esel,s,real,,49
sfe,all,1,pres,1,1.49999995250168e-012
esel,s,real,,50
sfe,all,1,pres,1,-500.
esel,all
nsub,1,1,1
time,1.
outres,erase
outres,all,none
outres,nsol,all,
outres,rsol,all
outres,eangl,all
outres,etmp,all
outres,veng,all
outres,strs,all,
outres,epel,all,
outres,eppl,all,
outres,cont,all,
! *********** WB SOLVE COMMAND ***********
! check interactive state
*get,ANSINTER_,active,,int
*if,ANSINTER_,ne,0,then
/eof
*endif
solve
/com *************** Write FE CONNECTORS *********
CEWRITE,file,ce,,INTE
/com,****************************************************
/com,*************** FINISHED SOLVE FOR LS 1 *************
*get,_NSOLTHREADS,active,0,ntfs
*get,_NSOLPROCESSES,active,0,npfs
/post1
fini
